*Heading
** Job name: airfoil Model name: Model-1
** Generated by: Abaqus/CAE Student Edition 2019
*Preprint, echo=NO, model=NO, history=NO, contact=NO
**
** PARTS
**
*Part, name=airfoil3d
*Node
      1,  0.431500614, -0.0378873497,           0.
      2,  0.480981559, -0.0208557472,           0.
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*Element, type=C3D8
  1,   1,   2,  24,  25,  30,  31,  53,  54
  2,  15,  24,   2,   4,  44,  53,  31,  33
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*Nset, nset=Set-1, generate
   1,  986,    1
*Elset, elset=Set-1, generate
   1,  594,    1
** Section: Section-1
*Solid Section, elset=Set-1, material=composite
,
*End Part
**
**
** ASSEMBLY
**
*Assembly, name=Assembly
**
*Instance, name=airfoil3d-1, part=airfoil3d
          0.,          -5.,           0.
          0.,          -5.,           0., 4.32978043075079e-17, -4.29289320984164, 0.707106790158355,         180.
*End Instance
**
*Nset, nset=Set-1, instance=airfoil3d-1, generate
  1,  29,   1
*Elset, elset=Set-1, instance=airfoil3d-1, generate
  1,  18,   1
*Nset, nset=interface, instance=airfoil3d-1
   1,   2,   3,   4,   5,   6
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*Elset, elset=interface, instance=airfoil3d-1, generate
   1,  594,    1
*End Assembly
**
** MATERIALS
**
*Material, name=composite
*Density
1000.,
*Elastic
 1e+09, 0.4
**
** BOUNDARY CONDITIONS
**
** Name: fixedEnd Type: Symmetry/Antisymmetry/Encastre
*Boundary
Set-1, PINNED
** ----------------------------------------------------------------
**
** STEP: loading
**
*Step, name=loading, nlgeom=NO
*Static
1., 1., 1e-05, 1.
**
** OUTPUT REQUESTS
**
*Restart, write, frequency=0
**
** FIELD OUTPUT: F-Output-1
**
*Output, field, variable=PRESELECT
**
** HISTORY OUTPUT: H-Output-1
**
*Output, history, variable=PRESELECT
*End Step
